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/BATCH
/COM,ANSYS RELEASE 2020 R1           BUILD 20.1      UP20191203       18:00:57
/input,menust,tmp,''
/COM,ANSYS RELEASE 2020 R1           BUILD 20.1      UP20191203       18:00:57
/GST,ON
/PLO,INFO,3
/GRO,CURL,ON
/CPLANE,1
WPSTYLE,,,,,,,,0
/PREP7
FINISH
/POST1
FINISH
/SOL
FINISH
/PREP7
MPTEMP,,,,,,,,
MPTEMP,1,0
MPDATA,DENS,1,,7.8E-06
MPTEMP,,,,,,,,
MPTEMP,1,0
MPDE,DENS,1
MPDATA,DENS,1,,7.8E-06
FLST,2,9,1,ORDE,2
FITEM,2,1
FITEM,2,-9
NDELE,P51X
NRRANG,1,999999999,1,
NREAD,'vozlisca',' ',' '
SAVE
SAVE
FLST,2,2,1
FITEM,2,1
FITEM,2,2
E,P51X
FLST,2,2,1
FITEM,2,2
FITEM,2,3
E,P51X
FLST,2,2,1
FITEM,2,3
FITEM,2,4
E,P51X
FLST,2,2,1
FITEM,2,4
FITEM,2,1
E,P51X
FLST,2,2,1
FITEM,2,5
FITEM,2,6
E,P51X
FLST,2,2,1
FITEM,2,6
FITEM,2,7
E,P51X
FLST,2,2,1
FITEM,2,7
FITEM,2,8
E,P51X
FLST,2,2,1
FITEM,2,8
FITEM,2,5
E,P51X
FLST,2,2,1
FITEM,2,9
FITEM,2,10
E,P51X
FLST,2,2,1
FITEM,2,10
FITEM,2,11
E,P51X
FLST,2,2,1
FITEM,2,11
FITEM,2,12
E,P51X
FLST,2,2,1
FITEM,2,12
FITEM,2,9
E,P51X
FLST,2,2,1
FITEM,2,1
FITEM,2,5
E,P51X
FLST,2,2,1
FITEM,2,5
FITEM,2,9
E,P51X
FLST,2,2,1
FITEM,2,2
FITEM,2,6
E,P51X
FLST,2,2,1
FITEM,2,6
FITEM,2,10
E,P51X
FLST,2,2,1
FITEM,2,3
FITEM,2,7
E,P51X
FLST,2,2,1
FITEM,2,7
FITEM,2,11
E,P51X
FLST,2,2,1
FITEM,2,4
FITEM,2,8
E,P51X
FLST,2,2,1
FITEM,2,8
FITEM,2,12
E,P51X
FLST,2,2,1
FITEM,2,1
FITEM,2,6
E,P51X
FLST,2,2,1
FITEM,2,2
FITEM,2,7
E,P51X
FLST,2,2,1
FITEM,2,3
FITEM,2,8
E,P51X
FLST,2,2,1
FITEM,2,4
FITEM,2,5
E,P51X
FLST,2,2,1
FITEM,2,6
FITEM,2,9
E,P51X
FLST,2,2,1
FITEM,2,7
FITEM,2,10
E,P51X
FLST,2,2,1
FITEM,2,8
FITEM,2,11
E,P51X
FLST,2,2,1
FITEM,2,5
FITEM,2,12
E,P51X
EWRITE,'elementi',' ',' ',0
FLST,2,28,2,ORDE,2
FITEM,2,4
FITEM,2,-31
EDELE,P51X
ERRANG,1,999999999,1,
EREAD,'elementi',' ',' '
EWRITE,'elementi2',' ',' ',0
SAVE
EPLOT
SAVE
SAVE
NPLOT
ANTYPE,2
FLST,2,4,1,ORDE,2
FITEM,2,1
FITEM,2,-4
/GO
D,P51X, , , , , ,ALL, , , , ,
SAVE
SAVE
EPLOT
FINISH
/SOL
/STATUS,SOLU
SOLVE
ANTYPE,2
MODOPT,SUBSP,552
MXPAND,552, , ,0
LUMPM,0
PSTRES,0
MODOPT,SUBSP,552,0,0, ,OFF
RIGID,
SUBOPT,STRMCHK,0
SUBOPT,MEMORY,AUTO
/STATUS,SOLU
SOLVE
FINISH
/POST1
SET,LIST
SAVE
SAVE
SET,LIST
SET,LIST
SAVE
FINISH
! /EXIT,ALL
/BATCH
/COM,ANSYS RELEASE 2020 R1           BUILD 20.1      UP20191203       20:43:36
/input,menust,tmp,''
/COM,ANSYS RELEASE 2020 R1           BUILD 20.1      UP20191203       20:43:36
/GST,ON
/PLO,INFO,3
/GRO,CURL,ON
/CPLANE,1
WPSTYLE,,,,,,,,0
EPLOT
/POST1
SET,LIST
SET,LIST
SET,PREVIOUS
SET,LAST
SET,LIST,999
SET,,, ,,, ,1
PLDI,2,
ANMODE,30,0.5, ,1
SET,LIST,999
SET,,, ,,, ,2
SET,,, ,,, ,2
PLDI,2,
ANMODE,30,0.5, ,1
PLDISP,0
PLDISP,0
PLDISP,0
/SHOW,WIN32C
SET,FIRST
/PLOPTS,INFO,3
/CONTOUR,ALL,18
/NUMBER,1
SET,,,,,,,392
SET,,,,,,,172
SET,,,,,,,1
SET,,,,,,,56
PLDISP,2
SET,,,,,,,552
PLDISP,2
SET,,,,,,,439
PLDISP,2
SET,,,,,,,379
PLDISP,2
SET,,,,,,,324
PLDISP,2
SET,,,,,,,269
PLDISP,2
SET,,,,,,,214
PLDISP,2
SET,,,,,,,1
PLDISP,2
PLDI, ,
ANMODE,30,0.5, ,1
PLDISP,2
SET,,,,,,,6
PLDISP,2
SET,,,,,,,3
PLDISP,2
EPLOT
FINISH
/POST26
FILE,'file','rst','.'
NUMVAR,200
SOLU,191,NCMIT
STORE,MERGE
FILLDATA,191,,,,1,1
REALVAR,191,191
FINISH
/POST1
FILE,'file','rst','.'
EPLOT
! /UIS,ABORT,1
/SHOW,WIN32
SET,LIST
PLDISP,0
PLDISP,0
/SHOW,WIN32C
SET,FIRST
/PLOPTS,INFO,3
/NUMBER,1
SET,1, 3,0
PLNSOL,
SET,,,,,,,3
! /UIS,ABORT,1
/SHOW,WIN32
PLDI, ,
ANMODE,30,0.5, ,1
SET,PREVIOUS
SET,PREVIOUS
SET,LIST,999
SET,,, ,,, ,2
SET,,, ,,, ,2
PLDI, ,
ANMODE,20,0.5, ,1
SET,PREVIOUS
SET,LIST,999
SET,,, ,,, ,5
PLDI, ,
ANMODE,20,0.5, ,1
SET,LIST,999
SET,,, ,,, ,1
SET,,, ,,, ,1
PLDI, ,
ANMODE,10,0.5, ,1
PLDI,1,
ANMODE,10,0.5, ,1
PLDI,2,
ANMODE,10,0.5, ,1
/NOPR
/GSAVE,_QUALITY_,SAV
/GSAVE,_QUALITY_,SV2
/CMAP,_QUALITY_,CMP,,SAVE
/GOPR
SET,LIST
FINISH
! /EXIT,ALL
/BATCH
/COM,ANSYS RELEASE 2020 R1           BUILD 20.1      UP20191203       00:12:57
/input,menust,tmp,''
/COM,ANSYS RELEASE 2020 R1           BUILD 20.1      UP20191203       00:12:57
/GST,ON
/PLO,INFO,3
/GRO,CURL,ON
/CPLANE,1
WPSTYLE,,,,,,,,0
/POST1
SET,LIST,999
SET,,, ,,, ,1
PLDI, ,
ANMODE,10,0.5, ,0
PLDI, ,
ANMODE,10,0.5, ,0
PLDISP,0
SET,LIST
FINISH
/SOL
FINISH
/PREP7
FINISH
/POST1
PLDISP,0
PLDISP,0
PLDISP,0
PLDISP,0
PLDISP,1
PLDISP,0
PLDISP,0
PLDISP,1
PLDISP,2
SET,LIST
PLDISP,0
PLDISP,0
PLDISP,0
ANDSCL,10,0.5
PLDISP,2
ANDSCL,10,0.5
PLDI,2,
ANMODE,10,0.5, ,0
SET,LIST,999
SET,,, ,,, ,2
PLDISP,2
ANDSCL,10,0.5
SET,LIST,999
SET,,, ,,, ,3
PLDISP,2
ANDSCL,10,0.5
/BATCH
/COM,ANSYS RELEASE 2020 R1           BUILD 20.1      UP20191203       21:43:22
/input,menust,tmp,''
/COM,ANSYS RELEASE 2020 R1           BUILD 20.1      UP20191203       21:43:22
/GST,ON
/PLO,INFO,3
/GRO,CURL,ON
/CPLANE,1
WPSTYLE,,,,,,,,0
/POST1
SET,LIST
SET,LIST,999
SET,,, ,,, ,1
EPLOT
PLDI,2,
ANMODE,20,0.5, ,0
SET,LIST,999
SET,,, ,,, ,2
PLDI,2,
ANMODE,20,0.5, ,1
SET,LIST,999
SET,,, ,,, ,3
PLDI,2,
ANMODE,20,0.5, ,1
FINISH
! /EXIT,MODEL
/BATCH
/COM,ANSYS RELEASE 2020 R1           BUILD 20.1      UP20191203       22:40:23
/input,menust,tmp,''
/COM,ANSYS RELEASE 2020 R1           BUILD 20.1      UP20191203       22:40:23
/GST,ON
/PLO,INFO,3
/GRO,CURL,ON
/CPLANE,1
WPSTYLE,,,,,,,,0
/SOLU
/STATUS,SOLU
SOLVE
FINISH
/POST1
SET,LIST
/SHOW,WIN32C
SET,FIRST
/PLOPTS,INFO,3
/CONTOUR,ALL,18
/NUMBER,1
! /UIS,ABORT,1
/SHOW,WIN32
/SHOW,WIN32C
SET,FIRST
/PLOPTS,INFO,3
/NUMBER,1
! /UIS,ABORT,1
/SHOW,WIN32
FINISH
/SOL
/STATUS,SOLU
SOLVE
FINISH
! /EXIT,MODEL
